// SBML level 3 version 1

model __main()

  // Compartments:
  compartment default_compartment = 1;

  // Species:
  species $PCoA in default_compartment = 0.01;
  species cha in default_compartment = 0.01;
  species nar in default_compartment = 0.01;
  species DHK in default_compartment = 0.002342853;
  species DHQ in default_compartment = 0.000791563;
  species DHM in default_compartment = 0.0004766951;
  species kam in default_compartment = 3.949157;
  species que in default_compartment = 1.334273;
  species myr in default_compartment = 0.8035261;
  species LCP in default_compartment = 0.002342853;
  species LCC in default_compartment = 0.000791563;
  species LCD in default_compartment = 0.0004766951;
  species pel in default_compartment = 3.949157;
  species cya in default_compartment = 1.334273;
  species del in default_compartment = 0.8035261;

  // Parameters:
  k_CHS_PCoA = 14;
  CHSt = 0.001;
  Km_CHS_PCoA = 0.013;
  k_CHI_cha = 14;
  CHIt = 0.001;
  Km_CHI_cha = 0.013;
  k_F3H_nar = 14;
  F3Ht = 0.001;
  Km_F3H_nar = 0.013;
  k_F3pH_DHK = 14;
  F3pHt = 0.001;
  Km_F3pH_DHK = 0.013;
  k_F35H_DHQ = 14;
  F35Ht = 0.001;
  Km_F35H_DHQ = 0.013;
  k_FLS_DHK = 14;
  FLSt = 0.001;
  Km_FLS_DHK = 0.013;
  Km_FLS_DHQ = 0.013;
  Km_FLS_DHM = 0.013;
  k_FLS_DHQ = 14;
  k_FLS_DHM = 14;
  k_DFR_DHK = 14;
  DFRt = 0.001;
  Km_DFR_DHK = 0.013;
  Km_DFR_DHQ = 0.013;
  Km_DFR_DHM = 0.013;
  k_DFR_DHQ = 14;
  k_DFR_DHM = 14;
  k_ANS_LCP = 14;
  ANSt = 0.001;
  Km_ANS_LCP = 0.013;
  Km_ANS_LCC = 0.013;
  Km_ANS_LCD = 0.013;
  k_ANS_LCC = 14;
  k_ANS_LCD = 14;
  k_pel_sink = 0.0005;
  k_cya_sink = 0.0005;
  k_del_sink = 0.0005;
  k_kam_sink = 0.0005;
  k_que_sink = 0.0005;
  k_myr_sink = 0.0005;
  k_FNS_nar = 14;
  Km_FNS_nar = 0.013;
  FNSt = 0.001;

  // Reactions:
  Source: => $PCoA; ;
  CHS: $PCoA => cha; k_CHS_PCoA*CHSt*PCoA/(Km_CHS_PCoA + PCoA);
  CHI: cha => nar; k_CHI_cha*CHIt*cha/(Km_CHI_cha + cha);
  F3H_nar: nar => DHK; k_F3H_nar*F3Ht*nar/(Km_F3H_nar + nar);
  F3pH_DHK: DHK => DHQ; k_F3pH_DHK*F3pHt*DHK/(Km_F3pH_DHK + DHK);
  F35H_DHQ: DHQ => DHM; k_F35H_DHQ*F35Ht*DHQ/(Km_F35H_DHQ + DHQ);
  FLS_DHK: DHK => kam; k_FLS_DHK*FLSt*DHK/(Km_FLS_DHK*(1 + DHQ/Km_FLS_DHQ + DHM/Km_FLS_DHM) + DHK);  // modifiers: DHQ, DHM
  FLS_DHQ: DHQ => que; k_FLS_DHQ*FLSt*DHQ/(Km_FLS_DHQ*(1 + DHM/Km_FLS_DHM + DHK/Km_FLS_DHK) + DHQ);  // modifiers: DHK, DHM
  FLS_DHM: DHM => myr; k_FLS_DHM*FLSt*DHM/(Km_FLS_DHM*(1 + DHK/Km_FLS_DHK + DHQ/Km_FLS_DHQ) + DHM);  // modifiers: DHK, DHQ
  DFR_DHK: DHK => LCP; k_DFR_DHK*DFRt*DHK/(Km_DFR_DHK*(1 + DHQ/Km_DFR_DHQ + DHM/Km_DFR_DHM) + DHK);  // modifiers: DHQ, DHM
  DFR_DHQ: DHQ => LCC; k_DFR_DHQ*DFRt*DHQ/(Km_DFR_DHQ*(1 + DHK/Km_DFR_DHK + DHM/Km_DFR_DHM) + DHQ);  // modifiers: DHK, DHM
  DFR_DHM: DHM => LCD; k_DFR_DHM*DFRt*DHM/(Km_DFR_DHM*(1 + DHK/Km_DFR_DHK + DHQ/Km_DFR_DHQ) + DHM);  // modifiers: DHK, DHQ
  ANS_LCP: LCP => pel; k_ANS_LCP*ANSt*LCP/(Km_ANS_LCP*(1 + LCC/Km_ANS_LCC + LCD/Km_ANS_LCD) + LCP);  // modifiers: LCC, LCD
  ANS_LCC: LCC => cya; k_ANS_LCC*ANSt*LCC/(Km_ANS_LCC*(1 + LCP/Km_ANS_LCP + LCD/Km_ANS_LCD) + LCC);  // modifiers: LCP, LCD
  ANS_LCD: LCD => del; k_ANS_LCD*ANSt*LCD/(Km_ANS_LCD*(1 + LCP/Km_ANS_LCP + LCC/Km_ANS_LCC) + LCD);  // modifiers: LCP, LCC
  pel_sink: pel => ; k_pel_sink*pel;
  cya_sink: cya => ; k_cya_sink*cya;
  del_sink: del => ; k_del_sink*del;
  kam_sink: kam => ; k_kam_sink*kam;
  que_sink: que => ; k_que_sink*que;
  myr_sink: myr => ; k_myr_sink*myr;
end
